// COMSOL Multiphysics 5.5.0.359 model "MoS2_HfO2_transistor_only_semi.mph"
// Outline of the model tree

Parameters
  t_MoS2 = 0.65[nm]  // Thickness 1 layer MoS2
  t_Au = 50[nm]  // Thickness gold contact
  t_HfO2 = 30[nm]  // Thickness HfO2
  t_SiO2 = 270[nm]  // Thickness SiO2
  t_Si = 270[nm]  // Thickness Silicon
  L_contact = 500[nm]  // Gold contact length
  mh_eff = 0.5*me_const  // Hole effective mass
  me_eff = 0.5*me_const  // Electron effective mass
  N_c = (2*(2*pi*me_eff*k_B_const*T)/h_const^2)^(3/2)  // Effective DOS conduction band
  N_v = (2*(2*pi*mh_eff*k_B_const*T)/h_const^2)^(3/2)  // Effective DOS valence band
  T = 293.15[K]  // Temperature
  Vd = 10[mV]  // Drain voltage
  Vtg = 0[V]  // Top gate voltage
  Vbg = 5[V]  // Bottom gate voltage
  Vs = 0[V]  // Source voltage
  W = 4[um]  // Width

Geometry
  geom1 "Geometry 1" (2D, length unit m)
    r1: Rectangle "Silicon" | size = {5*L_contact, t_Si}
    r2: Rectangle "SiO2" | pos = {0, t_SiO2}; size = {5*L_contact, t_SiO2}
    r5: Rectangle "MoS2" | pos = {L_contact, t_Si+t_SiO2}; size = {3*L_contact, t_MoS2}
    ls2: LineSegment "Gate"
      specify1 = coord
      coord1 = {2*L_contact, t_Si+t_SiO2+t_MoS2}
      specify2 = coord
      coord2 = {3*L_contact, t_Si+t_SiO2+t_MoS2}
    r6: Rectangle "Drain" | pos = {0, t_Si+t_SiO2}; size = {L_contact, 50[nm]}
    r7: Rectangle "Source" | pos = {4*L_contact, t_Si+t_SiO2}; size = {L_contact, 50[nm]}
    fin: Finalize "Form Union"

Materials
  mat1: Common "Si - Silicon" on domains 1
    def "Basic"
      relpermittivity = 11.7
      thermalconductivity = 131[W/(m*K)]
      density = 2329[kg/m^3]
      heatcapacity = 700[J/(kg*K)]
    AroraMobilityModel
      mun0_ref_arora = 1252[cm^2/(V*s)]
      mup0_ref_arora = 407[cm^2/(V*s)]
      mun_min_ref_arora = 88[cm^2/(V*s)]
      mup_min_ref_arora = 54.3[cm^2/(V*s)]
      Nn0_ref_arora = 1.26e17[1/cm^3]
      Np0_ref_arora = 2.35e17[1/cm^3]
      alpha0_arora = 0.88
      beta1_arora = -0.57
      beta2_arora = -2.33
      beta3_arora = -2.33
      beta4_arora = -0.146
      Tref_arora = 300[K]
    PowerLawMobilityModel
      mun0_pl = 1448[cm^2/(V*s)]
      mup0_pl = 473[cm^2/(V*s)]
      alphan_pl = 2.33
      alphap_pl = 2.23
      Tref_pl = 300[K]
    Auger "Auger recombination"
      Cn = 2.8e-31[cm^6/s]
      Cp = 9.9e-32[cm^6/s]
    Direct "Direct recombination"
      C = 0[cm^3/s]
    SRH "Shockley-Read-Hall recombination"
      taun = 10[us]
      taup = 10[us]
    FletcherMobilityModel
      F1_fl = 1.04e21[1/(cm^1*V*s)]
      F2_fl = 7.45e13[1/cm^2]
      Tref_fl = 300[K]
    CaugheyThomasMobilityModel
      alphan0_ct = 1.11
      alphap0_ct = 1.21
      vn0_ct = 1e7[cm/s]
      vp0_ct = 8.37e6[cm/s]
      betan1_ct = 0.66
      betap1_ct = 0.17
      betan2_ct = -0.87
      betap2_ct = -0.52
      Tref_ct = 300[K]
    SemicondMaterial "Semiconductor material"
      Eg0 = 1.12[V]
      chi0 = 4.05[V]
      Nv = (T/300[K])^(3/2)*1.04e19[1/cm^3]
      Nc = (T/300[K])^(3/2)*2.8e19[1/cm^3]
      mun = 1450[cm^2/(V*s)]
      mup = 500[cm^2/(V*s)]
    LombardiSurfaceMobilityModel
      deltan_ls = 5.82e14[V/s]
      deltap_ls = 2.05e14[V/s]
      mun1_ls = 4.75e7[cm^2/(V*s)]
      mup1_ls = 9.93e7[cm^2/(V*s)]
      mun2_ls = 1.74e5[cm^2/(V*s)]
      mup2_ls = 8.84e5[cm^2/(V*s)]
      alphan_ls = 0.125
      alphap_ls = 0.0317
      Tref_ls = 1[K]
      Eref_ls = 1[V/cm]
      Nref_ls = 1[1/cm^3]
    ImpactIonization
      an = 0.426
      ap = 0.243
      bn = 4.81E5[V/cm]
      bp = 6.53E5[V/cm]
      cnii = 3.05E-4
      cpii = 5.35E-4
      dn = 6.86E-4
      dp = 5.67E-4
    SlotboomModel
      Eref_sb = 0.00692[V]
      Nref_sb = 1.3e17[1/cm^3]
      alpha_sb = 0.5
    JainRoulstonModel
      An_jr = 3.5e-8[V]
      Bn_jr = 0[V]
      Cn_jr = 0[V]
      Ap_jr = 3.5e-8[V]
      Bp_jr = 0[V]
      Cp_jr = 0[V]
      Nref_jr = 1[1/cm^3]
      alpha_jr = 0.5
  mat2: Common "SiO2 - Silicon oxide" on domains 2
    def "Basic"
      electricconductivity = 0[S/m]
      thermalexpansioncoefficient = 0.5e-6[1/K]
      heatcapacity = 730[J/(kg*K)]
      relpermittivity = 4.2
      density = 2200[kg/m^3]
      thermalconductivity = 1.4[W/(m*K)]
    Enu "Young's modulus and Poisson's ratio"
      youngsmodulus = 70e9[Pa]
      poissonsratio = 0.17
  mat5: Common "MoS2 - Monolayer" on domains 3-5
    def "Basic"
      relpermittivity = 4.2
    SemicondMaterial "Semiconductor material"
      Eg0 = 1.8
      chi0 = 4.7[V]
      Nv = N_v
      Nc = N_c
      mun = 200[cm^2/(V*s)]
      mup = 200[cm^2/(V*s)]
    SRH "Shockley-Read-Hall recombination"
      taun = 1.5[ns]
      taup = 1.5[ns]
  mat6: Common "Au - Gold" on domains 3, 5
    def "Basic"
      electricconductivity = 45.6e6[S/m]
      thermalexpansioncoefficient = 14.2e-6[1/K]
      heatcapacity = 129[J/(kg*K)]
      density = 19300[kg/m^3]
      thermalconductivity = 317[W/(m*K)]
    Enu "Young's modulus and Poisson's ratio"
      youngsmodulus = 70e9[Pa]
      poissonsratio = 0.44

Physics
  semi: Semiconductor on domains 2, 4
    dependent variable V
    d.d = W
    smm1: SemiconductorMaterialModel (default)
    ins1: Insulation (default)
    zc1: ZeroCharge (default)
    ii1: InsulatorInterface (default)
    cont1: Continuity "Continuity/Heterojunction 1" (default)
    init1: init "Initial Values 1" (default)
    mc1: MetalContact "Drain" on boundaries 8 | ContactType = Schottky; SpecifyUsing = richardsons; Phi = 4.8[V]; V0 = Vd
    mc2: MetalContact "Source" on boundaries 14 | ContactType = Schottky; Phi = 4.8[V]; V0 = 0
    term1: Terminal "Bottom Gate" on boundaries 4 | TerminalType = Voltage; V0 = Vbg; Phic = 0.1[V]
    ccn1: ChargeConservation on domains 2
    adm1: AnalyticDopingModel on domains 3-5 | impurityType = donor; NDc = 1.5e18[1/cm^3]
    tar1: TrapAssistedRecombination on domains 3-5
    gc1: GateContact "Top Gate" on boundaries 12
      TerminalType = Voltage
      V0 = Vtg
      epsilon_ins = 25
      d_ins = t_HfO2
      Phi = 4[V]

Mesh
  mesh1 "Mesh 1"
    size3: Size on boundaries 14 | hauto = 4
    size4: Size on boundaries 8 | table = semi; hauto = 4
    size5: Size on domains 3-5 | table = semi; hauto = 4
    ftri1: FreeTri "Free Triangular 1" on remaining entities

Studies
  std1 "Id(Vd)"
    param: Parametric "Parametric Sweep" | pname = Vbg; plistarr = 1,5; punit = V
    stat: Stationary | useparam = on; pname = Vd; plistarr = range(-40,10,40); punit = mV
  std4 "Id(Vd) high"
    param: Parametric "Parametric Sweep" | pname = Vbg; plistarr = 1,5; punit = V
    stat: Stationary | useparam = on; pname = Vd; plistarr = range(0,0.1,1), range(2,10); punit = V
  std2 "Id(Vbg)"
    param: Parametric "Parametric Sweep" | pname = Vd; plistarr = 10; punit = mV
    stat: Stationary
      errestandadap = none
      meshadaptmethod = modify
      useparam = on
      pname = Vbg
      plistarr = range(10,-1,-1)
      punit = V
  std3 "Id(Vtg)"
    param: Parametric "Parametric Sweep"
      sweeptype = filled
      pname = {Vbg, Vd}
      plistarr = {0, "0.01,0.1, 0.5"}
      punit = {V, V}
    stat: Stationary | useparam = on; pname = Vtg; plistarr = range(4,-1,-4); punit = V

Solver configurations
  sol1 "Solution 1" (study std1)
    v1: Variables "Dependent Variables 1"
    s1: Stationary "Stationary Solver 1" | stol = 1.0E-6
      p1: Parametric | porder = constant
      fc1: FullyCoupled | linsolver = d1; initstep = 0.1; minsteprecovery = 0.001; maxiter = 50
      d1: Direct
  sol2 "Parametric Solutions 1" (study std1)
  sol5 "Solution 5" (study std2)
    // same settings as sol1
  sol6 "Parametric Solutions 2" (study std2)
  sol8 "Solution 8" (study std3)
    // same settings as sol1
  sol9 "Parametric Solutions 3" (study std3)
  sol14 "Solution 14" (study std4)
    // same settings as sol1
  sol15 "Parametric Solutions 4" (study std4)
  sol34 "Adaptive Mesh Refinement Solutions 1" (study std2)

Datasets
  dset1: Solution | solution = sol1
  dset2: Solution | solution = sol2
  dset3: Solution | solution = sol5
  dset4: Solution | solution = sol6
  dset5: Solution | solution = sol8
  dset6: Solution | solution = sol9
  dset7: Solution | solution = sol14
  dset8: Solution | solution = sol15
  dset9: Solution | solution = sol34

Plots
  pg6: PlotGroup1D "Id(Vd)" | data = dset1
    glob1: Global | data = dset2; expr = semi.I0_1; unit = uA; descr = Terminal current
  pg11: PlotGroup1D "Id(Vbg)" | data = dset3
    glob1: Global | data = dset3; expr = semi.I0_1; unit = nA
  pg16: PlotGroup1D "Id(Vd) high" | data = dset7
    glob1: Global | data = dset8; expr = semi.I0_1; unit = uA
  pg18: PlotGroup1D "Id(Vtg)" | data = dset6
    glob1: Global | expr = semi.I0_1
  pg19: PlotGroup2D "Electron Concentration (semi)" | data = dset8
    surf1: Surface | expr = semi.log10N
  pg20: PlotGroup2D "Hole Concentration (semi)" | data = dset8
    surf1: Surface | expr = semi.log10P
  pg21: PlotGroup2D "Electric Potential (semi)" | data = dset8
    surf1: Surface | expr = V
  pg22: PlotGroup2D "Electron Concentration (semi) 1" | data = dset2
    surf1: Surface | expr = semi.log10N
  pg23: PlotGroup2D "Hole Concentration (semi) 1" | data = dset2
    surf1: Surface | expr = semi.log10P
  pg24: PlotGroup2D "Electric Potential (semi) 1" | data = dset2
    surf1: Surface | expr = V
  pg25: PlotGroup2D "Electron Concentration (semi) 2" | data = dset4
    surf1: Surface | expr = semi.log10N
  pg26: PlotGroup2D "Hole Concentration (semi) 2" | data = dset4
    surf1: Surface | expr = semi.log10P
  pg27: PlotGroup2D "Electric Potential (semi) 2" | data = dset4
    surf1: Surface | expr = V