// COMSOL Multiphysics 5.5.0.359 model "monolayer_mos2.mph"
// Outline of the model tree

Parameters
  t_MoS2 = 0.7[nm]
  m_h = 0.5*me_const  // Holes Effective Mass
  me_eff = 0.5*me_const  // Electron Effective Mass
  N_c = (2*(2*pi*me_eff*k_B_const*T)/h_const^2)^(3/2)  // Effective DOS conduction band
  N_v = (2*(2*pi*m_h*k_B_const*T)/h_const^2)^(3/2)  // Effective DOS valence band
  T = 293[K]
  t_gate = 10[nm]
  VD = 5[V]  // Drain Voltage
  VG = 5[V]  // Gate Voltage
  tox = 2
  WF_gate = 5.1[V]
  epsr_ins = 25
  t_out = 100[um]
  donor_concentration = 1.5e18[cm^(-3)]  // Donor concentration

Geometry
  geom1 "Geometry 1" (2D, length unit µm)
    r1: Rectangle | pos = {-3, 0}; size = {6, 2}
    r2: Rectangle | pos = {-3, 2}; size = {6, 0.3}
    r3: Rectangle | pos = {-1.75, 2+0.3}; size = {3.5, 1*t_MoS2}
    r4: Rectangle | pos = {-3, 2+0.3}; size = {(6-3.5)/2, 75[nm]}
    r5: Rectangle | pos = {3-(6-3.5)/2, 2+0.3}; size = {(6-3.5)/2, 75[nm]}
    r6: Rectangle | pos = {-3, 2+0.3}; size = {6, 1}
    fin: Finalize "Form Union"

Materials
  mat1: Common "MoS2 - Monolayer" on domains 4, 5
    def "Basic"
      relpermittivity = 4.2
    SemicondMaterial "Semiconductor material"
      Eg0 = 2.76
      chi0 = 4.7[V]
      Nv = N_v
      Nc = N_c
      mun = 200[cm^2/(V*s)]
      mup = 200[cm^2/(V*s)]
    SRH "Shockley-Read-Hall recombination"
      taun = 1.5[ns]
      taup = 1.5[ns]
  mat2: Common "Air" on domains 4
    def "Basic"
      relpermittivity = 1
  mat3: Common "Gold" on domains 3, 6
    def "Basic"
      relpermittivity = 1
  mat4: Common "Silicon" on domains 1
  mat5: Common "SiO2" on domains 2
    def "Basic"
      relpermittivity = 3.9

Physics
  semi: Semiconductor on domains 2, 5
    dependent variable V2
    d.d = t_out
    smm1: SemiconductorMaterialModel (default)
    ins1: Insulation (default)
    zc1: ZeroCharge (default)
    ii1: InsulatorInterface (default)
    cont1: Continuity "Continuity/Heterojunction 1" (default)
    init1: init "Initial Values 1" (default) | SpecifyInitialValues = Default
    ccn1: ChargeConservation on domains 2
    tar1: TrapAssistedRecombination on domains 4, 5
    mc1: MetalContact "Drain" on boundaries 10 | ContactType = Schottky; V0 = V
    mc2: MetalContact "Source" on boundaries 14 | ContactType = Schottky; SpecifyUsing = richardsons; V0 = V
    term1: Terminal on boundaries 4 | TerminalType = Voltage; V0 = V; Phic = 4.05
    adm1: AnalyticDopingModel on domains 5 | impurityType = donor; NAc = 1.5e18[1/cm^3]; NDc = donor_concentration
  es: Electrostatics on domains 1-6
    dependent variable V
    d.d = t_out
    ccn1: ChargeConservation (default)
    zc1: ZeroCharge (default)
    init1: init "Initial Values 1" (default)
    term1: DomainTerminal "Drain" on domains 3 | TerminalType = Voltage; V0 = VD
    term2: DomainTerminal "Source" on domains 6 | TerminalType = Voltage; V0 = 0
    term3: DomainTerminal "Gate" on domains 1 | TerminalType = Voltage; V0 = VG

Mesh
  mesh1 "Mesh 1"
    size: MeshSizeDefault | hmax = 0.402; hmin = 0.0018; hcurve = 0.3; hgrad = 1.3
    size1: Size on domains 5 | hauto = 4
    size2: Size on boundaries 14 | hauto = 4
    size3: Size on boundaries 10 | hauto = 4
    ftri1: FreeTri "Free Triangular 1" on remaining entities

Studies
  std1 "Id(Vd)"
    param: Parametric "Parametric Sweep"
      sweeptype = filled
      pname = {VG, donor_concentration}
      plistarr = {10, "1.5e18, 3e18, 6e18"}
      punit = {V, 1/cm^3}
    stat: Stationary | useparam = on; sweeptype = filled; pname = VD; plistarr = range(-0.05,0.01,0.05); punit = V
  std2 "Id(Vg)"
    param: Parametric "Parametric Sweep"
      sweeptype = filled
      pname = {donor_concentration, VD}
      plistarr = {"1.5e18, 3e18, 6e18", 0.05}
      punit = {1/cm^3, V}
    stat: Stationary "Id(Vg)" | useparam = on; pname = VG; plistarr = range(0,5,20); punit = V

Solver configurations
  sol1 "Solution 1" (study std1)
    v1: Variables "Dependent Variables 1"
    s1: Stationary "Stationary Solver 1" | stol = 1.0E-6
      dDef: Direct
      fc1: FullyCoupled | linsolver = dDef; initstep = 0.1; maxiter = 50
      pDef: Parametric
  sol2 "Parametric Solutions 1" (study std1)
  sol6 "Solution 6" (study std2)
    v1: Variables "Dependent Variables 1"
    s1: Stationary "Stationary Solver 1" | stol = 1.0E-6
      p1: Parametric | porder = constant
      fc1: FullyCoupled | linsolver = d1; initstep = 0.1; maxiter = 50
      d1: Direct
  sol7 "Parametric Solutions 2" (study std2)

Datasets
  dset1: Solution | solution = sol1
  dset2: Solution | solution = sol2
  dset3: Solution | solution = sol6
  dset4: Solution | solution = sol7

Plots
  pg5: PlotGroup1D "Id(Vd)" | data = dset2
    glob1: Global
      data = dset2
      expr = semi.I0_1
      unit = uA
      descr = Terminal current
      legends = {"VG=10 V, donor_concentration=1.5E18 1/cm<sup>3</sup>", "VG=10 V, donor_concentration=3E18 1/cm<sup>3</sup>", "VG=10 V, donor_concentration=6E18 1/cm<sup>3</sup>"}
  pg6: PlotGroup1D "Id(Vg)" | data = dset4
    glob1: Global
      expr = semi.I0_1
      unit = nA
      legends = {"donor_concentration=1.5E18 1/cm<sup>3</sup>, VD=0.05 V", "donor_concentration=3E18 1/cm<sup>3</sup>, VD=0.05 V", "donor_concentration=6E18 1/cm<sup>3</sup>, VD=0.05 V"}
  pg7: PlotGroup2D "Electron Concentration (semi)" | data = dset4
    surf1: Surface | expr = semi.log10N
  pg8: PlotGroup2D "Hole Concentration (semi)" | data = dset4
    surf1: Surface | expr = semi.log10P
  pg9: PlotGroup2D "Electric Potential (semi)" | data = dset4
    surf1: Surface | expr = V2
  pg10: PlotGroup2D "Electric Potential (es)" | data = dset4
    surf1: Surface | expr = V