// COMSOL Multiphysics 5.5.0.359 model "monolayer_mos2_only_semi.mph"
// Outline of the model tree

Parameters
  t_MoS2 = 0.7[nm]  // Thickness 1 layer MoS2
  t_Au = 50[nm]  // Thickness gold contact
  t_SiO2 = 300[nm]  // Thickness SiO2
  t_Si = 2[um]  // Thickness Silicon
  L_MoS2 = 3.5[um]  // Gold contact length
  mh_eff = 0.5*me_const  // Hole effective mass
  me_eff = 0.5*me_const  // Electron effective mass
  N_c = (2*(2*pi*me_eff*k_B_const*T)/h_const^2)^(3/2)  // Effective DOS conduction band
  N_v = (2*(2*pi*mh_eff*k_B_const*T)/h_const^2)^(3/2)  // Effective DOS valence band
  T = 293.15[K]  // Temperature
  Vd = 10[mV]  // Drain voltage
  Vg = 5[V]  // Gate voltage
  Vs = 0[V]  // Source voltage
  W = 6.8[um]  // Width
  donor_concentration = 1.5e18[cm^(-3)]  // Donor concentration
  epsr_ins = 3.9  // SiO2 Relative Permettivity
  WF_gate = 4.05[V]  // Work function gate
  WF_gold = 5.1[V]  // Work function gold

Geometry
  geom1 "Geometry 1" (2D, length unit µm)
    r1: Rectangle "Silicon" | pos = {-3, 0}; size = {6, t_Si}
    r2: Rectangle "SiO2" | pos = {-3, t_Si}; size = {6, t_SiO2}
    r5: Rectangle "MoS2" | pos = {-1.75, t_Si+t_SiO2}; size = {L_MoS2, t_MoS2}
    ls1: LineSegment "Drain" (disabled)
      specify1 = coord
      coord1 = {-1.75, t_Si+t_SiO2}
      specify2 = coord
      coord2 = {-1.75, t_Si+t_SiO2+t_MoS2}
    ls3: LineSegment "Source" (disabled)
      specify1 = coord
      coord1 = {1.75, t_Si+t_SiO2}
      specify2 = coord
      coord2 = {1.75, t_Si+t_SiO2+t_MoS2}
    ls2: LineSegment "Gate" (disabled) | specify1 = coord; coord1 = {-3, 0}; specify2 = coord; coord2 = {3, 0}
    r6: Rectangle "Drain Gold" | pos = {-3, t_Si+t_SiO2}; size = {1.25, t_Au}
    r7: Rectangle "Source Gold" | pos = {1.75, t_Si+t_SiO2}; size = {1.25, t_Au}
    r8: Rectangle "Gate Gold" (disabled) | pos = {-3, 0}; size = {6, t_Au}
    fin: Finalize "Form Union"

Materials
  mat1: Common "Si - Silicon" on domains 1
    def "Basic"
      relpermittivity = 11.7
      thermalconductivity = 131[W/(m*K)]
      density = 2329[kg/m^3]
      heatcapacity = 700[J/(kg*K)]
    AroraMobilityModel
      mun0_ref_arora = 1252[cm^2/(V*s)]
      mup0_ref_arora = 407[cm^2/(V*s)]
      mun_min_ref_arora = 88[cm^2/(V*s)]
      mup_min_ref_arora = 54.3[cm^2/(V*s)]
      Nn0_ref_arora = 1.26e17[1/cm^3]
      Np0_ref_arora = 2.35e17[1/cm^3]
      alpha0_arora = 0.88
      beta1_arora = -0.57
      beta2_arora = -2.33
      beta3_arora = -2.33
      beta4_arora = -0.146
      Tref_arora = 300[K]
    PowerLawMobilityModel
      mun0_pl = 1448[cm^2/(V*s)]
      mup0_pl = 473[cm^2/(V*s)]
      alphan_pl = 2.33
      alphap_pl = 2.23
      Tref_pl = 300[K]
    Auger "Auger recombination"
      Cn = 2.8e-31[cm^6/s]
      Cp = 9.9e-32[cm^6/s]
    Direct "Direct recombination"
      C = 0[cm^3/s]
    SRH "Shockley-Read-Hall recombination"
      taun = 10[us]
      taup = 10[us]
    FletcherMobilityModel
      F1_fl = 1.04e21[1/(cm^1*V*s)]
      F2_fl = 7.45e13[1/cm^2]
      Tref_fl = 300[K]
    CaugheyThomasMobilityModel
      alphan0_ct = 1.11
      alphap0_ct = 1.21
      vn0_ct = 1e7[cm/s]
      vp0_ct = 8.37e6[cm/s]
      betan1_ct = 0.66
      betap1_ct = 0.17
      betan2_ct = -0.87
      betap2_ct = -0.52
      Tref_ct = 300[K]
    SemicondMaterial "Semiconductor material"
      Eg0 = 1.12[V]
      chi0 = 4.05[V]
      Nv = (T/300[K])^(3/2)*1.04e19[1/cm^3]
      Nc = (T/300[K])^(3/2)*2.8e19[1/cm^3]
      mun = 1450[cm^2/(V*s)]
      mup = 500[cm^2/(V*s)]
    LombardiSurfaceMobilityModel
      deltan_ls = 5.82e14[V/s]
      deltap_ls = 2.05e14[V/s]
      mun1_ls = 4.75e7[cm^2/(V*s)]
      mup1_ls = 9.93e7[cm^2/(V*s)]
      mun2_ls = 1.74e5[cm^2/(V*s)]
      mup2_ls = 8.84e5[cm^2/(V*s)]
      alphan_ls = 0.125
      alphap_ls = 0.0317
      Tref_ls = 1[K]
      Eref_ls = 1[V/cm]
      Nref_ls = 1[1/cm^3]
    ImpactIonization
      an = 0.426
      ap = 0.243
      bn = 4.81E5[V/cm]
      bp = 6.53E5[V/cm]
      cnii = 3.05E-4
      cpii = 5.35E-4
      dn = 6.86E-4
      dp = 5.67E-4
    SlotboomModel
      Eref_sb = 0.00692[V]
      Nref_sb = 1.3e17[1/cm^3]
      alpha_sb = 0.5
    JainRoulstonModel
      An_jr = 3.5e-8[V]
      Bn_jr = 0[V]
      Cn_jr = 0[V]
      Ap_jr = 3.5e-8[V]
      Bp_jr = 0[V]
      Cp_jr = 0[V]
      Nref_jr = 1[1/cm^3]
      alpha_jr = 0.5
  mat2: Common "SiO2 - Silicon oxide" on domains 2
    def "Basic"
      electricconductivity = 0[S/m]
      thermalexpansioncoefficient = 0.5e-6[1/K]
      heatcapacity = 730[J/(kg*K)]
      relpermittivity = epsr_ins
      density = 2200[kg/m^3]
      thermalconductivity = 1.4[W/(m*K)]
    Enu "Young's modulus and Poisson's ratio"
      youngsmodulus = 70e9[Pa]
      poissonsratio = 0.17
  mat5: Common "MoS2 - Monolayer" on domains 4
    def "Basic"
      relpermittivity = 4.2
    SemicondMaterial "Semiconductor material"
      Eg0 = 2.76
      chi0 = 4.7[V]
      Nv = N_v
      Nc = N_c
      mun = 10[cm^2/(V*s)]
      mup = 10[cm^2/(V*s)]
    SRH "Shockley-Read-Hall recombination"
      taun = 1.5[ns]
      taup = 1.5[ns]
  mat6: Common "Au - Gold" on domains 3, 5
    def "Basic"
      electricconductivity = 45.6e6[S/m]
      thermalexpansioncoefficient = 14.2e-6[1/K]
      heatcapacity = 129[J/(kg*K)]
      density = 19300[kg/m^3]
      thermalconductivity = 317[W/(m*K)]
    Enu "Young's modulus and Poisson's ratio"
      youngsmodulus = 70e9[Pa]
      poissonsratio = 0.44

Physics
  semi: Semiconductor on domains 2, 4
    dependent variable V
    d.d = W
    ModelProperties.CarrierStatistics = Boltzmann
    smm1: SemiconductorMaterialModel (default)
    ins1: Insulation (default)
    zc1: ZeroCharge (default)
    ii1: InsulatorInterface (default)
    cont1: Continuity "Continuity/Heterojunction 1" (default)
    init1: init "Initial Values 1" (default)
    ccn1: ChargeConservation on domains 2 | materialType = from_mat
    tar1: TrapAssistedRecombination on domains 3-5
    mc5: MetalContact "Drain" on boundaries 8
      ContactType = ohmic
      SpecifyUsing = richardsons
      Phi = 0
      TerminalName = 1
      V0 = Vd
    mc4: MetalContact "Source" on boundaries 12
      ContactType = ohmic
      SpecifyUsing = richardsons
      Phi = 0
      TerminalName = 2
      V0 = Vs
    term1: Terminal "Gate" on boundaries 4 | TerminalName = 3; TerminalType = Voltage; V0 = Vg; Phic = WF_gate
    adm1: AnalyticDopingModel on domains 3-5 | impurityType = donor; NDc = donor_concentration

Mesh
  mesh1 "Mesh 1"
    size3: Size on boundaries 12 | hauto = 4
    size4: Size on boundaries 8 | table = semi; hauto = 4
    size5: Size on domains 3-5 | table = semi; hauto = 4
    ftri1: FreeTri "Free Triangular 1" on remaining entities

Studies
  std1 "Id(Vd)"
    param: Parametric "Parametric Sweep"
      sweeptype = filled
      pname = {Vg, donor_concentration}
      plistarr = {10, "1.5e18, 3e18, 6e18"}
      punit = {V, 1/(cm^3)}
    stat: Stationary | useparam = on; pname = Vd; plistarr = range(-0.05,0.01,0.05); punit = V
  std2 "Id(Vg)"
    param: Parametric "Parametric Sweep"
      sweeptype = filled
      pname = {Vd, donor_concentration}
      plistarr = {0.05, "1.5e18, 3e18, 6e18"}
      punit = {V, 1/(cm^3)}
    stat: Stationary | useparam = on; pname = Vg; plistarr = range(0,5,20); punit = V

Solver configurations
  sol1 "Solution 1" (study std1)
    v1: Variables "Dependent Variables 1"
    s1: Stationary "Stationary Solver 1" | stol = 1.0E-6
      p1: Parametric | porder = constant
      fc1: FullyCoupled | linsolver = d1; initstep = 0.1; minsteprecovery = 0.001; maxiter = 50
      d1: Direct
  sol2 "Parametric Solutions 1" (study std1)
  sol6 "Solution 6" (study std2)
    // same settings as sol1
  sol7 "Parametric Solutions 2" (study std2)

Datasets
  dset1: Solution | solution = sol1
  dset2: Solution | solution = sol2
  dset3: Solution | solution = sol6
  dset4: Solution | solution = sol7

Plots
  pg1: PlotGroup2D "Electron Concentration (semi)" | data = dset2
    surf1: Surface | expr = semi.log10N
  pg2: PlotGroup2D "Hole Concentration (semi)" | data = dset2
    surf1: Surface | expr = semi.log10P
  pg3: PlotGroup2D "Electric Potential (semi)" | data = dset2
    surf1: Surface | expr = V
  pg4: PlotGroup1D "Id(Vd)" | data = dset2
    glob1: Global
      data = dset2
      expr = semi.I0_1
      unit = uA
      legends = {"Vg=10 V, donor_concentration=1.5E18 1/(cm<sup>3</sup>)", "Vg=10 V, donor_concentration=3E18 1/(cm<sup>3</sup>)", "Vg=10 V, donor_concentration=6E18 1/(cm<sup>3</sup>)"}
  pg5: PlotGroup1D "Id(Vg)" | data = dset4
    glob1: Global
      expr = semi.I0_1
      unit = nA
      legends = {"Vd=0.05 V, donor_concentration=1.5E18 1/(cm<sup>3</sup>)", "Vd=0.05 V, donor_concentration=3E18 1/(cm<sup>3</sup>)", "Vd=0.05 V, donor_concentration=6E18 1/(cm<sup>3</sup>)"}